# Reproduce quadratic SNAP energies for equilibrium and displaced diamond Si.

units metal
atom_style atomic
boundary p p p

lattice diamond 5.43
region simulation_box block 0 2 0 2 0 2 units lattice
create_box 1 simulation_box
create_atoms 1 box
mass 1 28.0855

pair_style snap
pair_coeff * * quadratic_si.snapcoeff quadratic_si.snapparam Si

compute snap_descriptor all sna/atom 4.0 0.99363 2 0.50 1.00 &
        rmin0 0.0 quadraticflag 0 bzeroflag 1 switchflag 1
compute snap_energy all pe/atom

thermo 1
thermo_style custom step atoms pe
thermo_modify format float %.17g

dump snap_reference all custom 1 quadratic_si.dump &
     id type x y z c_snap_descriptor[*] c_snap_energy
dump_modify snap_reference sort id format float %.17g

run 0

group displaced_atom id 1
displace_atoms displaced_atom move 0.137 -0.083 0.059 units box
dump_modify snap_reference first no
run 1
